# https://de.wikipedia.org/wiki/Widerstandsmoment
# https://www.maschinenbau-wissen.de/skript3/mechanik/festigkeitslehre/136-torsion
# https://de.wikipedia.org/wiki/Schubmodul
# Torsion Solarpaneel-Reling:
# Allgemeine Formeln:
# Mt.....Torsionsmoment
# F.....Kraft
# r.....Hebelarm
# φ.....Verdrehwinkel
# T.....Torsionsmoment
# l.....länge
# G.....Schubmodul
# IT.....Torsionsträgheitsmoment
# W.....Widerstandmoment
# Mt=F x r  [Nm]
# φ=T x l/G x IT  [rad]
# τT=MT/W
# Angabe:
F_H := 196.2 N  # Haltekraft
F_G := 10.5 kg  # Eigengewicht Solarpaneel
r := 0.180 m
b := 0.68 m
h := 0.034 m
# Berechnung:
M_T := F_H*r = 35.316 J
W := b*h^2/6 = 0.131013 L
τ_T := M_T/W = 0.26956 N/mm^2
# Torsion am Solarpaneel auf der Reling ist sehr gering -> stellt kein Problem dar
