# https://www.silentwindgenerator.com/de/maritim/
# https://www.e-genius.at/lernfelder/erneuerbare-energien/grundlagen-windenergie/leistung-einer-windkraftanlage
# https://de.wikipedia.org/wiki/Winddruck
# https://www.maschinenbau-wissen.de/skript3/mechanik/balken-biegung/209-biegung-berechnen
# Windgenerator: (Biegung-Rohr) Windkraft mit projizierter Fläche ausgerechnet:
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# Allgemeine Formeln:
# σb=Mb/W
# σb.....Biegespannung
# Mb.....Biegemoment
# W.....Widerstandsmoment
# F.....Windkraft
# l.....Hebelarm
# P.....Leistung des Windes
# ρ.....Dichte
# r.....Rotorradius
# v.....Windgeschwindigkeit
# W=π/32 x (D^4-d^4)/D
# Mb=F x l
# P=(ρx r^2 x πx v^3)/2
# Formeln für Windkraft:
# WD.....Winddruck [N/mm²]
# w.....Windlast [N]
# cp.....Druckbeiwert [-]
# ρ.....Dichte [kg/m³]
# v & c.....Geschwindigkeit
# cu.....Anströmgeschw. vor Kontakt mit Objekt
# WD= cp x ρ/2 x v²
# cp= 1-(c/cu)²
# w= A x WD
# Angabe:
ρ := 1.204 kg/m^3  # bei 20°C
r := 0.6 m
v_max := 18 m/s
l := 1055 mm
c_u := 9.271 m/s
c := 7 m/s  # c = angenommen geschw. nach kontakt
D := 60 mm
d := 54 mm
# Rechnung:
c_p := 1 - (c/c_u)^2 = 0.429911
W_D := c_p*ρ/2*v_max^2 = 8.38532e-5 N/mm^2
A_Ges. := 79147.1776 mm^2  # AGes.....projezierte Fläche
w := W_D*A_Ges. = 6.63675 N  # w = Windkraft/last
M_b := w*l = 7001.77 N*mm
W := π/16*(D^4 - d^4)/D = 14585.3 mm^3
σ_b := M_b/W = 0.480056 N/mm^2
# Die Berechnung bezieht sich auf das Rohr. Der Windgenerator arbeitet in diesem zustand nicht und es wurde mit der projizierten Fläche gerechnet. (Windgenerator dreht sich nicht, Kraft ist größer wenn sich der Windgenerator nicht dreht)
