# alle Formeln aus Tabellenbuch Metall
# Belastungsfall 2 nach Euler hat Grenzschlankheitsgrad für Tetmajerfall überschritten. Böge S. D-62
# Knickung bei Absteifstange:
l := 1090 mm
R := 12.5 mm
r := 10 mm
D := 25 mm
d := 20 mm
E := 200000 N/mm^2
ν := 3  # ν im Maschinenbau (bei Knickung) 3.....10
# Berechnung:
# λ.....Schlankheitsgrad
# i .....Bezugsradius
# I.....Flächenmoment 2. Grades
# S.....Querschnittsfläche
# σ_K.....Knickspannung nach Euler
# FK.....Knickkraft nach Euler
# ν.....Sicherheitszahl
# σ_dzul.....zulässige Druckspannung
# Fdzul.....zulässige Druckkraft
I := π*(D^4 - d^4)/64 = 11320.8 mm^4
S := R^2*π - r^2*π = 176.715 mm^2
i := sqrt(I/S) = 8.00391 mm
λ := l/i = 136.184
σ_K := E*π^2/λ^2 = 106.434 N/mm^2
F_K := E*I*π^2/l^2 = 18808.5 N
σ_dzul := σ_K/ν = 35.478 N/mm^2
F_dzul := F_K/ν = 6269.48 N
