# Schraubenberechnung:
# Festigkeitsklasse: 8.8 | Schraube: M10
# Angaben:
F := 230 N
z := 4  # Schraubenanzahl
l_W := 60 mm
l_K := 50 mm  # l_K  # Klemmlänge  # l_W  # Hebel
n := 0.4  # Böge
α_A := 1.80  # Böge: I80
E_S := 2.0*10^5 N/mm^2  # E-Modul Schraube
E_B := 1.8*10^5 N/mm^2  # E-Modul Befestigung (Edelstahl-Platte)
R_p0.2 := 640 N/mm^2
R_m := 800 N/mm^2
# Skizze:
# Berechnung:
M_b := F*l_W = 13.8 N*m
# M10 -> Schrauben
ν := 0.6  # angenommen Böge: I80
μ := 0.1  # Reibung: Stahl-Stahl
A_Serf := α_A*F/(ν*R_p0.2) = 1.07812 mm^2  # Erforderlicher Spannungsquerschnitt
# M10:
d := 10 mm
d_2 := 9.026 mm
