# Standgewicht Windgenerator auf Schiffspiegel:
# Angabe:
m_gesW := 22.65 kg
F_mW := 222.1965 N
A_auflageW := 9719.42 mm^2
F_W := F_mW/A_auflageW = 0.0228611 N/mm^2
# Standgewicht Solar auf Reling:
# Angabe:
m_gesS := 13.907 kg
F_mS := 136.4277 N
A_auflageS := 9840.8 mm^2
F_S := F_mS/A_auflageS = 0.0138635 N/mm^2
# Standgewicht Windgenerator auf Schiffspiegel:
# Angabe:
m_W := 22.65 kg
l_W := 60 mm
F := m_W*g = 222.121 N
# Berechnung:
M := F*l_W = 13.3272 N*m
# Standgewicht Solar auf Reling:
# Angabe:
m_S := 13.907 kg
l_S := 180 mm
F := m_S*g = 136.381 N
M := F*l_S = 24.5486 N*m
