# https://www.biancahoegel.de/flug/aerodynamik/staudruck.html
# Staudruck ebene Platte:
#
# Angabe:
A_Ges. := 1.02 m^2
v := 9.271 m/s
ρ := 1.204 kg/m^3  # bei 20°C
p_0 := 1.013 bar  # auf Meereshöhe
# Berechnung:
p_a := p_0 + 1/2*ρ*v^2 = 101352 Pa
# pa.....Druck am Staupunkt
# Δp.....Druckdifferenz
# p0.....Umgebungsdruck
# ρ.....Dichte Luft
# Fp.....Kraft
Δp := p_a - p_0 = 51.7428 Pa
F_p := Δp*A_Ges. = 52.7776 N
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# Federkraft mit Staudruck:
m_gg := 20.72 kg
m_g := 15.323 kg
b := 0.0095 m
F_S := 52.778 N
F_n := 18.182 N
a := 0.42 m
# Berechnung:
F_g := m_g*g = 150.267 N
F_gg := m_gg*g = 203.194 N
ΣFx := F_S - F_n = 34.596 N
ΣFy := F_g + F_gg = 353.461 N
ΣM := ΣFx*a - ΣFy*b = 11.1724 N*m
# Anmerkung:
# bleibt bei einer Geschwindigkeit von 9,7 m/s (18 kn) nicht geöffnet.
# Versuch: (bis zu wieviel m/s hält das Solarpaneel)
A_Ges. := 1.02 m^2
v := 3.75 m/s
a := 0.42 m
ρ := 1.204 kg/m^3  # bei 20°C
p_0 := 1.013 bar  # auf Meereshöhe
# Berechnung:
p_a := p_0 + 1/2*ρ*v^2 = 101308 Pa
# pa.....Druck am Staupunkt
# Δp.....Druckdifferenz
# p0.....Umgebungsdruck
# ρ.....Dichte Luft
# Fp.....Kraft
Δp := p_a - p_0 = 8.46562 Pa
F_p := Δp*A_Ges. = 8.63494 N
M := F_p*a = 3.62667 N*m
# Anmerkung:
# Das Moment welches bei 3,75 m/s (7,22kn) auftritt zeigt, dass das Solarpaneel bis zu dieser Geschwindigkeit offen bleibt, da die 4 Federn gemeinsam ein Moment haben von 4Nm.
