# https://de.wikihow.com/Windlast-berechnen#:~:text=Die%20allgemeine%20Formel%20f%C3%BCr%20Windlast,mit%20bekannter%20Fl%C3%A4che%20zu%20berechnen.
# Windkraft auf Solar Davits
# Allgemeine Formeln | F.....Windlast
# F=A*P*Cd  P=0,00256*v² | A.....Fläche Solarpanel [ft²]
# P.....Winddruck [P/Sf]
# Cd.....Luftwiderstandsbeiwert [-]
# Windgeschwindigkeit durchschnitt 18 Knoten
# Angabe:
A := 10.979 ft^2
v := 20.741 mph
Cd := 1.4
# Berechnung:
P := 0.00256*20.741^2 = 1.10128  # P/Sf
F := 10.979*1.101*1.4 = 16.923  # lbs  # 16,923 lbs = 7,676 kg
# 7,676 kg wirken auf das Solarpaneel bei frontaler Anströmung des Windes im durchschnitt in der Adria bei 18 Knoten Wind.
