# https://www.maschinenbau-wissen.de/skript3/mechanik/festigkeitslehre/149-zugspannung-berechnen
# Zugspannung auf Absteifung Windgenerator:
# Werkstoff: V4A
# Festigkeitsklasse: A4-50
# Rm = 50 x 10 = 500N/mm²
# Re = 210 N/mm²
# S = 1,5
# Rm.....Zugfestigkeit
# Re.....Streckgrenze
# S.....Sicherheitsfaktor
# σzul.....zulässige Spannung
# A.....Querschnittsfläche
# F.....zulässige Zugkraft
# Angabe:
R_m := 500 N/mm^2
S := 1.5
D_1 := 25 mm
D_2 := 20 mm
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# Berechnung:
σ_zul := R_m/S = 333.333 N/mm^2
A := D_1^2*π/4 - D_2^2*π/4 = 176.715 mm^2
F := σ_zul*A = 58904.9 N
