F_Sx := 1 N
# Abscherung & Biegespannung am Bolzen der Absteifstange:
# Angabe:
d := 6 mm
F_w := 6.637 N
a := 2020 mm
r := 3 mm
b := 3590 mm
# Skizze:
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# Berechnung:
ΣM_B := F_w*b + F_Sx*a  # =0
F_Sx := F_w*b/a = 11.7955 N
F_S := F_Sx/sin(55°) = 14.3996 N
τ_a := F_S/(r^2*π) = 0.509282 N/mm^2
M_t := F_S*r = 43.1988 N*mm
W := π/32*d^3 = 21.2058 mm^3  # genauer nachlesen Böge S. D23 / D72
τ_t := M_t/W = 2.03713 N/mm^2
# ist falsch, weil Mb müsste null sein -> siehe skizze
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