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l_1 := 590 mm
l_2 := 250 mm
l_3 := 180 mm
F_g := 105 N
F_D := 200 N
α := 11.5°
# Fg ... Gewichtskraft
# FD ... Dämpferkraft
# FH ... Haltekraft
# FA ... Auflagekraft
F_Dy := sin(α)*F_D = 39.8736 N
F_Dx := cos(α)*F_D = 195.985 N
ΣF_x == -F_Dx + F_Ax  # =0
ΣF_y == -F_H - F_G + F_Dy + F_Ay  # =0
ΣM_A == F_H*l_1 + F_g*l_2 - F_Dy*l_3  # =0
F_H := (F_g*l_2 - F_Dy*l_3)/l_1
F_H = 32.3267 N
F_Ay := F_H + F_g - F_Dy
F_Ay = 97.4531 N
F_Ax := F_Dx
F_Ax = 195.985 N
F_A := sqrt(F_Ay^2 + F_Ax^2)
F_A = 218.877 N
